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/batch
! ANSYS input file written by Workbench version 2025 R2
! File used for geometry attach: C:\Users\saluc\Documents\GitHub\personliga-uppgifter\ansys_files\dp0\SYS\DM\SYS.scdocx
/title,ansys--Static Structural (A5)
/COM,/COM,     ANSYSMotion, 2025.2
/com,--- Data in consistent MKS units. See Solving Units in the help system for more information.
/units,MKS
/prep7
! Turn off shape checking because checks already performed inside WB mesher.
! See help system for more information.
SHPP,OFF,,NOWARN
etcon,set             ! allow ANSYS to choose best KEYOP's for 180x elements, resets any applicable keyopt to MAPDL defaults
/com,*********** Send User Defined Coordinate System(s) ***********
csys,0
/com,*********** Nodes for the whole assembly ***********
nblock,3,,118
(1i9,3e20.9e3)
        1    -3.000000000E-03     0.000000000E+00     0.000000000E+00
        2    -3.000000000E-03     0.000000000E+00    -5.000000000E+00
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-1
/com,*********** Elements for Body 1 'Beam (Rectangular Tube)' ***********
et,1,188
keyo,1,3,2
MAT,1 $ TYPE,1 $ REAL,1 $ SECNUM,1 $ ESYS,0
eblock,11,COMPACT,,18
(11i9)
        1        1        3       55
        2        3        4       56
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-1
secnum,1    ! reset the section ID to default
/com,*********** Elements for Body 2 'Beam (Rectangular Tube)' ***********
et,2,188
keyo,2,3,2
MAT,2 $ TYPE,2 $ REAL,2 $ SECNUM,2 $ ESYS,0
eblock,11,COMPACT,,18
(11i9)
       19       20       22       73
       20       22       23       74
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-1
secnum,1    ! reset the section ID to default
/com,*********** Elements for Body 3 'Beam (Rectangular Tube2)' ***********
et,3,188
keyo,3,3,2
MAT,3 $ TYPE,3 $ REAL,3 $ SECNUM,3 $ ESYS,0
eblock,11,COMPACT,,9
(11i9)
       37        2       39       91
       38       39       40       92
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-1
secnum,1    ! reset the section ID to default
/com,*********** Elements for Body 4 'Beam (Rectangular Tube2)' ***********
et,4,188
keyo,4,3,2
MAT,4 $ TYPE,4 $ REAL,4 $ SECNUM,4 $ ESYS,0
eblock,11,COMPACT,,9
(11i9)
       46       11       47      100
       47       47       48      101
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-1
secnum,1    ! reset the section ID to default
toffst,273.15,      ! Temperature offset from absolute zero
/com,*********** Set Reference Temperature ***********
tref,22.
/com,*********** Send Materials ***********
Temperature = 'TEMP' ! Temperature
MP,DENS,1,7850,	! kg m^-3
MP,ALPX,1,1.2e-05,	! C^-1
MP,C,1,434,	! J kg^-1 C^-1
MP,KXX,1,60.5,	! W m^-1 C^-1
MP,RSVX,1,1.7e-07,	! kg m^3 A^-2 s^-3
MP,EX,1,200000000000,	! Pa
MP,NUXY,1,0.3,
MP,MURX,1,10000,

Temperature = 'TEMP' ! Temperature
MP,DENS,2,7850,	! kg m^-3
MP,ALPX,2,1.2e-05,	! C^-1
MP,C,2,434,	! J kg^-1 C^-1
MP,KXX,2,60.5,	! W m^-1 C^-1
MP,RSVX,2,1.7e-07,	! kg m^3 A^-2 s^-3
MP,EX,2,200000000000,	! Pa
MP,NUXY,2,0.3,
MP,MURX,2,10000,

Temperature = 'TEMP' ! Temperature
MP,DENS,3,7850,	! kg m^-3
MP,ALPX,3,1.2e-05,	! C^-1
MP,C,3,434,	! J kg^-1 C^-1
MP,KXX,3,60.5,	! W m^-1 C^-1
MP,RSVX,3,1.7e-07,	! kg m^3 A^-2 s^-3
MP,EX,3,200000000000,	! Pa
MP,NUXY,3,0.3,
MP,MURX,3,10000,

Temperature = 'TEMP' ! Temperature
MP,DENS,4,7850,	! kg m^-3
MP,ALPX,4,1.2e-05,	! C^-1
MP,C,4,434,	! J kg^-1 C^-1
MP,KXX,4,60.5,	! W m^-1 C^-1
MP,RSVX,4,1.7e-07,	! kg m^3 A^-2 s^-3
MP,EX,4,200000000000,	! Pa
MP,NUXY,4,0.3,
MP,MURX,4,10000,

/com,*********** Send Beam Properties ***********
SECTYPE,1,BEAM,HREC
SECDATA,4.99999999999729e-002,4.99999999999729e-002,1.99999999999998e-003,2.00000000000061e-003,1.99999999999998e-003,2.0000000000006e-003
secoffset,cent

SECTYPE,2,BEAM,HREC
SECDATA,4.99999999999729e-002,4.99999999999729e-002,1.99999999999998e-003,2.00000000000061e-003,1.99999999999998e-003,2.0000000000006e-003
secoffset,cent

SECTYPE,3,BEAM,HREC
SECDATA,4.99999999999729e-002,0.100000000000027,3.99999999999999e-003,4.00000000000046e-003,3.99999999999999e-003,4.00000000000045e-003
secoffset,cent

SECTYPE,4,BEAM,HREC
SECDATA,4.99999999999729e-002,0.100000000000027,3.99999999999999e-003,4.00000000000046e-003,3.99999999999999e-003,4.00000000000045e-003
secoffset,cent

!************************* Model Summary ********************
!Beam (Rectangular Tube),	Structural Steel,	matid,	1
!Beam (Rectangular Tube),	Structural Steel,	matid,	2
!Beam (Rectangular Tube2),	Structural Steel,	matid,	3
!Beam (Rectangular Tube2),	Structural Steel,	matid,	4
!************************* End Model Summary ********************
CMBLOCK,_CM43_FIXEDSU,NODE,        1
(8i10)
         1
/com,*********** Create Displacement Components For Use In Future MSUP or Multistage Analysis ******
CMBLOCK,_CM44_DISP,NODE,        1
(8i10)
        30
/com,*********** Create Displacement Components For Use In Future MSUP or Multistage Analysis ******
CMBLOCK,_CM47_DISP,NODE,        1
(8i10)
         2
/com,*********** Create Displacement Components For Use In Future MSUP or Multistage Analysis ******
CMBLOCK,_CM49_DISP,NODE,        2
(8i10)
        20       -29
/com,*********** Create Displacement Components For Use In Future MSUP or Multistage Analysis ******
CMBLOCK,_CM51_DISP,NODE,        1
(8i10)
        11
/com,*********** Create Displacement Components For Use In Future MSUP or Multistage Analysis ******
CMBLOCK,_CM53_DISP,NODE,        1
(8i10)
        20
/com,*********** Fixed Supports ***********
CMBLOCK,_FIXEDSU,NODE,        1
(8i10)
         1
cmsel,s,_FIXEDSU
d,all,all
nsel,all
/com,******* Constant Zero Displacement Y *******
CMBLOCK,_DISPZEROUY,NODE,        4
(8i10)
         2        11        20       -29
cmsel,s,_DISPZEROUY
d,all,uy,0
nsel,all
/com,******* Constant Zero Displacement Z *******
CMBLOCK,_DISPZEROUZ,NODE,        1
(8i10)
        30
cmsel,s,_DISPZEROUZ
d,all,uz,0
nsel,all
/com,*********** Define Vertex Force Using Follower Elements ***********
et,5,201
keyo,5,1,1          ! Keep the direction constant
keyo,5,2,1          ! Apply Forces only, not moment
mat,5
real,5
type,5
en,55,11
r,5
rmod,5,1,1.0,              ! FX
mat,6
real,6
type,5
en,56,11
r,6
rmod,6,2,1.0,              ! FY
mat,7
real,7
type,5
en,57,11
r,7
rmod,7,3,1.0,              ! FZ
fini
/com,****************************************************************************
/com,*************************    SOLUTION       ********************************
/com,****************************************************************************
/solu
antype,0                   ! static analysis
_thickRatio=  0     ! Ratio of thick parts in the model
eqsl,sparse,,,,,1
cntr,print,1               ! print out contact info and also make no initial contact an error
nldiag,cont,iter           ! print out contact info each equilibrium iteration
rescontrol,linear,last           ! Turn on restart files due to future eigen analysis intent
/com,****************************************************
/com,******************* SOLVE FOR LS 1 OF 1 ****************
esel,s,real,,5
sfe,all,1,pres,1,0.
esel,s,real,,6
sfe,all,1,pres,1,0.
esel,s,real,,7
sfe,all,1,pres,1,1.
esel,all
nsub,1,1,1
time,1.
outres,erase
outres,all,none
outres,nsol,all,
outres,rsol,all
outres,eangl,all
outres,etmp,all
outres,veng,all
outres,strs,all,
outres,epel,all,
outres,eppl,all,
outres,cont,all,
esel,s,type,,1
esel,a,type,,2,4
cm,_elmisc,elem
esel,all
outres,misc,all,_elmisc
! *********** WB SOLVE COMMAND ***********
! check interactive state
*get,ANSINTER_,active,,int
*if,ANSINTER_,ne,0,then
/eof
*endif
solve
/com *************** Write FE CONNECTORS *********
CEWRITE,file,ce,,INTE
/com,****************************************************
/com,*************** FINISHED SOLVE FOR LS 1 *************
*get,_NSOLTHREADS,active,0,ntfs
*get,_NSOLPROCESSES,active,0,npfs
/post1
fini
